# Pour granular particles into chute container, then induce flow
echo both
atom_style      granular
atom_modify     map array
communicate     single vel yes

boundary        f f f
newton          off

# cm - g- s
units           si

region          reg block -5e-3 15e-3 0 5e-3 0 10e-3 units box
create_box      1 reg

neighbor        70e-6 bin
neigh_modify    delay 0


# Material properties required for granular pair styles

fix         m1 all property/global youngsModulus peratomtype 1.95e8 # 降低2-3数量级
fix         m2 all property/global poissonsRatio peratomtype 0.3
fix         m3 all property/global coefficientRestitution peratomtypepair 1 0.3 #0.9
fix         m4 all property/global coefficientFriction peratomtypepair 1 0.5 #0.3
fix         m5 all property/global coefficientRollingFriction peratomtypepair 1 0.0
fix         m6 all property/global cohesionEnergyDensity peratomtypepair 1 0.025


# pair style
pair_style  gran model hertz tangential history # Hertzian without cohesion
pair_coeff  * *

# timestep, gravity
timestep    1e-7
fix         gravi all gravity 9.81 vector 0.0 0.0 -1.0

# load STL ASCII Mode
fix cad1 all mesh/surface file mesh/blader_left.stl type 1 scale 1e-3
fix cad2 all mesh/surface file mesh/blader_right.stl type 1 scale 1e-3
fix cad3 all mesh/surface file mesh/roller.stl type 1 scale 1e-3

# walls
fix     rollerwall all wall/gran model hertz tangential history cohesion sjkr mesh n_meshes 3 meshes cad1 cad2 cad3
fix     zwalls1  all wall/gran model hertz tangential history primitive type 1 zplane 0
fix     zwalls2  all wall/gran model hertz tangential history primitive type 1 zplane 10e-3
fix     xwalls1  all wall/gran model hertz tangential history primitive type 1 xplane -5e-3
fix     xwalls2  all wall/gran model hertz tangential history primitive type 1 xplane 15e-3
fix     ywalls1  all wall/gran model hertz tangential history primitive type 1 yplane 0
fix     ywalls2  all wall/gran model hertz tangential history primitive type 1 yplane 5e-3
# fix     zwalls3  all wall/gran model hertz tangential history primitive type 1 zplane 3e-3

#fix cfdmesh all mesh/surface file ../CFD/mesh.stl type 1
#fix walls all wall/gran model hertz tangential history mesh n_meshes 1 meshes cfdmesh

# particle distributions and insertion
#region bc block -0.05 0.05 -0.0025 0.0025 0.05 0.1 units box
region bc block -4e-3 -0.5e-3 0 5e-3 3.2e-3 8e-3 units box
fix     pts1 all particletemplate/sphere 1 atom_type 1 density constant 7.65e3 radius constant 35e-6
fix     pdd1 all particledistribution/discrete 1 1 pts1 1.0

fix     ins all insert/pack seed 100001 distributiontemplate pdd1 vel constant 0. 0. -1.0 insert_every once overlapcheck yes particles_in_region 20000 region bc

# apply nve integration to all particles that are inserted as single particles
fix     integr all nve/sphere

# screen output
compute         rke all erotate/sphere
thermo_style    custom step atoms ke c_rke vol
thermo          1000
thermo_modify   lost ignore norm no
compute_modify  thermo_temp dynamic yes

fix		timecheck all check/timestep/gran 1 0.02 0.02
run		1
unfix		timecheck

# insert the first particles so that dump is not empty
run         1
dump        dmp all custom 500 post/dump*.liggghts_init id type x y z ix iy iz vx vy vz fx fy fz omegax omegay omegaz radius
dump        dumpstl all mesh/stl 500 post/dump*.stl
#force : f_couple_cfd[0] f_couple_cfd[1] f_couple_cfd[2]
#node : f_couple_cfd[6]
#cell id : f_couple_cfd[7]

run         60000 upto
write_restart   post/restart/liggghts.restart
